*Heading
*Node
      1,           0.,          -5.,           5.
      2,           0.,          -4.,           5.
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*Element, type=DC3D8
  1,   37,   38,   44,   43,    1,    2,    8,    7
  2,   38,   39,   45,   44,    2,    3,    9,    8
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*Nset, nset=_PICKEDSET3, generate
    1,  1116,     1
*Elset, elset=_PICKEDSET3, generate
   1,  750,    1
*Solid Section, elset=_PICKEDSET3, material=MATERIAL-1
,
*System
*Nset, nset=_PICKEDSET5, generate
    1,  1116,     1
*Elset, elset=_PICKEDSET5, generate
   1,  750,    1
*Elset, elset=__PICKEDSURF4_S1, generate
 726,  750,    1
*Surface, type=ELEMENT, name=_PICKEDSURF4
__PICKEDSURF4_S1, S1
*Material, name=MATERIAL-1
*Conductivity
 16.3,
*Density
 7.8e-09,
*Specific Heat
500000.,
*Initial Conditions, type=TEMPERATURE
_PICKEDSET5, 25.
** ----------------------------------------------------------------
*Step, name=Step-1, nlgeom=NO
*Heat Transfer
0.1, 10., 0.0001, 0.1,
*Dflux
__PICKEDSURF4_S1, S1, 100.
*Output, field
*Node File
NT,
*End Step
